// SBML level 2 version 3

model MM()

  // Compartments:
  compartment cell = 1;

  // Species:
  species E_s in cell = 6022.0002; E_s is "E(s)";
  species S_Y_0 in cell = 0.02925066; S_Y_0 is "S(Y~0)";
  species E_s_1_S_Y_0_1 in cell = 0.0026795939; E_s_1_S_Y_0_1 is "E(s!1).S(Y~0!1)";
  species S_Y_P in cell = 602199.97; S_Y_P is "S(Y~P)";

  // Parameters:
  NA = 6.022e17;
  V = 1e-12;
  km1 = 0.1;
  k2 = 0.01;
  kdeg = 0.01;
  kp1 = 1/(NA*V);
  ksyn = 1e-4*NA*V;
  E0 = 0.01*NA*V;
  S0 = 1*NA*V;

  // Assignment rules:
  SU := 0 + S_Y_0;
  SP := 0 + S_Y_P;
  ES := 0 + E_s_1_S_Y_0_1;
  Etot := E_s + E_s_1_S_Y_0_1;

  // Reactions:
  R1: E_s + S_Y_0 => E_s_1_S_Y_0_1; kp1*E_s*S_Y_0;
  R2: => E_s; ksyn;
  R3: E_s => ; kdeg*E_s;
  R4: E_s_1_S_Y_0_1 => E_s + S_Y_0; km1*E_s_1_S_Y_0_1;
  R5: E_s_1_S_Y_0_1 => E_s + S_Y_P; k2*E_s_1_S_Y_0_1;
end
